# OpenSim document version 40000
InverseKinematicsTool:
  results_directory: ./
  model_file: Model_Pose2Sim_Blazepose_scaled.osim
  constraint_weight: Inf
  accuracy: 1e-5
  time_range: 0.01666667 1
  output_motion_file: \Blazepose.mot
  report_errors: true
  marker_file: ../pose-3d/blazepose_filt_0-60.trc
  report_marker_locations: false
  IKTaskSet:
    IKMarkerTask nose: apply=true weight=0.1
    IKMarkerTask left_eye: apply=true weight=0.05
    IKMarkerTask right_eye: apply=true weight=0.05
    IKMarkerTask left_shoulder: apply=true weight=2
    IKMarkerTask right_shoulder: apply=true weight=2
    IKMarkerTask left_elbow: apply=true weight=1
    IKMarkerTask right_elbow: apply=true weight=1
    IKMarkerTask left_wrist: apply=true weight=1
    IKMarkerTask right_wrist: apply=true weight=1
    IKMarkerTask left_hip: apply=true weight=2
    IKMarkerTask right_hip: apply=true weight=2
    IKMarkerTask left_knee: apply=true weight=1
    IKMarkerTask right_knee: apply=true weight=1
    IKMarkerTask left_ankle: apply=true weight=1
    IKMarkerTask right_ankle: apply=true weight=1
    IKMarkerTask left_foot_index: apply=true weight=1
    IKMarkerTask left_heel: apply=true weight=1
    IKMarkerTask right_foot_index: apply=true weight=1
    IKMarkerTask right_heel: apply=true weight=1
    IKMarkerTask right_thumb: apply=true weight=0.05
    IKMarkerTask left_thumb: apply=true weight=0.05
    IKMarkerTask left_pinky: apply=true weight=0.05
    IKMarkerTask right_pinky: apply=true weight=0.05
    IKMarkerTask left_index: apply=true weight=0.05
    IKMarkerTask right_index: apply=true weight=0.05
    IKCoordinateTask L5_S1_Flex_Ext: apply=true weight=1 value_type=default_value value=0
